// COMSOL Multiphysics 5.5.0.359 model "thermoelectric_cooler.mph"
// Thermoelectric Cooler
// applicationdescr_heat/thermoelectric_cooler
// Thermoelectric coolers are widely used for electronics cooling in various application areas, ranging from consumer products to spacecraft design. The thermoelectric modules are a common application of thermoelectricity in cooling engineering. They consist of several thermoelectric legs sandwiched between two thermally conductive plates, one cold and one hot. The device that needs to be cooled down must be attached to the cold face.
// Due to the variety of applications, there can be many different thermoelectric cooler configurations. This app covers the basic design of a single-stage thermoelectric cooler of different sizes with different thermocoupled sizes and distributions. It also serves as a starting point for more detailed calculations with additional input options and can be extended to multistage thermoelectric coolers.
// Outline of the model tree

Parameters
  length = 8[mm]  // Total length
  width = 10[mm]  // Total width
  height = 2.5[mm]  // Total height
  d_conductor = 100[um]  // Conductor thickness
  d_ceramics = 0.3[mm]  // Ceramics thickness
  leg_length = 1[mm]  // Leg cross section in length
  leg_width = 1.2[mm]  // Leg cross section in width
  leg_height = height-2*(d_conductor+d_ceramics)  // Leg height
  pitch = 0.5[mm]  // Pitch
  n_length = floor((length-2*pitch-leg_length)/(leg_length+pitch))+1-mod(floor((length-2*pitch-leg_length)/(leg_length+pitch))+1,2)  // Number of legs in length
  n_width = floor((width-2*pitch-leg_width)/(leg_width+pitch))+1  // Number of legs in width
  network_length = (leg_length+pitch)*n_length-pitch  // Length of legs network
  network_width = (leg_width+pitch)*n_width-pitch  // Width of legs network
  N = (floor((length-2*pitch-leg_length)/(leg_length+pitch))+1-mod(floor((length-2*pitch-leg_length)/(leg_length+pitch))+1,2))*((floor((width-2*pitch-leg_width)/(leg_width+pitch))+1))/2  // Number of thermocouples
  Tref = 323.15[K]  // Hot side temperature
  dT0 = 50[K]  // Prescribed temperature difference
  I0 = 1  // Prescribed relative electrical current

Variables
  var1 "Variables 1"
    dT = aveop1(T)-aveop2(T)

Selections
  uni1: Union "Ceramics" | entitydim = 3; input = {geom1_csel5_dom, geom1_csel6_dom}
  box1: Box "Conductors, Bottom"
    entitydim = 3
    zmin = d_ceramics/2
    zmax = d_ceramics+d_conductor+leg_height/2
    condition = inside
  box2: Box "Conductors, Top"
    entitydim = 3
    zmin = d_ceramics+d_conductor+leg_height/2
    zmax = d_ceramics+5*d_conductor/2+leg_height
    condition = inside
  box3: Box "Mesh, Mapped Surfaces"
    entitydim = 2
    zmin = d_ceramics+d_conductor/2
    zmax = d_ceramics+d_conductor+leg_height/2
    condition = inside
  uni2: Union "Thermocouples" | entitydim = 3; input = {geom1_csel1_dom, geom1_csel2_dom}
  uni3: Union "Electric Domains" | entitydim = 3; input = {uni2, geom1_csel3_dom}
  dif1: Difference "Mesh, Ceramics Faces Toward Interior"
    entitydim = 2
    add = {geom1_sel4}
    subtract = {geom1_csel3_bnd}
  int1: Intersection "Ground" | entitydim = 2; input = {geom1_csel4_bnd, geom1_sel4}

Couplings
  aveop1: Average "Average: Hot Side" on selection geom1_sel1
  aveop2: Average "Average: Cold Side" on selection geom1_sel2

Geometry
  geom1 "Geometry 1" (3D, length unit m)
    blk1: Block
      pos = {(width-2*pitch-((leg_width+pitch)*n_width-pitch))/2+pitch, (length-2*pitch-((leg_length+pitch)*n_length-pitch))/2+pitch, d_ceramics+d_conductor}
      size = {leg_width, leg_length, leg_height}
    arr1: Array
      contributeto = csel1
      input = blk1
      size = {ceil(n_width/2), ceil(n_length/2), 1}
      fullsize = {ceil(n_width/2), ceil(n_length/2), 1}
      displ = {2*(leg_width+pitch), 2*(leg_length+pitch), 0}
    blk2: Block
      pos = {(width-2*pitch-((leg_width+pitch)*n_width-pitch))/2+pitch+leg_width+pitch, (length-2*pitch-((leg_length+pitch)*n_length-pitch))/2+pitch+leg_length+pitch, d_ceramics+d_conductor}
      size = {leg_width, leg_length, leg_height}
    arr2: Array
      contributeto = csel1
      input = blk2
      size = {floor(n_width/2), floor(n_length/2), 1}
      fullsize = {floor(n_width/2), floor(n_length/2), 1}
      displ = {2*(leg_width+pitch), 2*(leg_length+pitch), 0}
    blk3: Block
      pos = {(width-2*pitch-((leg_width+pitch)*n_width-pitch))/2+pitch+leg_width+pitch, (length-2*pitch-((leg_length+pitch)*n_length-pitch))/2+pitch, d_ceramics+d_conductor}
      size = {leg_width, leg_length, leg_height}
    arr3: Array
      contributeto = csel2
      input = blk3
      size = {floor(n_width/2), ceil(n_length/2), 1}
      fullsize = {floor(n_width/2), ceil(n_length/2), 1}
      displ = {2*(leg_width+pitch), 2*(leg_length+pitch), 0}
    blk4: Block
      pos = {(width-2*pitch-((leg_width+pitch)*n_width-pitch))/2+pitch, (length-2*pitch-((leg_length+pitch)*n_length-pitch))/2+pitch+leg_length+pitch, d_ceramics+d_conductor}
      size = {leg_width, leg_length, leg_height}
    arr4: Array
      contributeto = csel2
      input = blk4
      size = {ceil(n_width/2), floor(n_length/2), 1}
      fullsize = {ceil(n_width/2), floor(n_length/2), 1}
      displ = {2*(leg_width+pitch), 2*(leg_length+pitch), 0}
    blk5: Block
      contributeto = csel3
      pos = {(width-2*pitch-network_width)/2+pitch, (length-2*pitch-network_length)/2+pitch, d_ceramics}
      size = {leg_width, leg_length, d_conductor}
    copy1: Copy
      contributeto = csel4
      input = blk5
      keep = on
      displx = mod(n_length,2)*(network_width-leg_width)
      disply = network_length-leg_length
      displz = mod(n_length*n_width,2)*(d_conductor+leg_height)
    blk6: Block
      pos = {(width-2*pitch-network_width)/2+pitch, (length-2*pitch-network_length)/2+pitch, d_ceramics+d_conductor+leg_height}
      size = {2*leg_width+pitch, leg_length, d_conductor}
    arr5: Array
      contributeto = csel3
      input = blk6
      size = {floor(n_width/2), n_length, 1}
      fullsize = {floor(n_width/2), n_length, 1}
      displ = {2*(leg_width+pitch), leg_length+pitch, 0}
    blk7: Block
      pos = {(width-2*pitch-network_width)/2+pitch+leg_width+pitch, (length-2*pitch-network_length)/2+pitch, d_ceramics}
      size = {2*leg_width+pitch, leg_length, d_conductor}
    arr6: Array
      contributeto = csel3
      input = blk7
      size = {floor((n_width-1)/2), n_length, 1}
      fullsize = {floor((n_width-1)/2), n_length, 1}
      displ = {2*(leg_width+pitch), leg_length+pitch, 0}
    blk8: Block
      pos = {(width-2*pitch-network_width)/2+pitch, (length-2*pitch-network_length)/2+pitch+leg_length+pitch, d_ceramics}
      size = {leg_width, 2*leg_length+pitch, d_conductor}
    arr7: Array
      contributeto = csel3
      input = blk8
      size = floor((n_length-1)/2)
      type = linear
      linearsize = floor((n_length-1)/2)
      displ = {0, 2*(leg_length+pitch), 0}
    blk9: Block
      pos = {width-(width-2*pitch-network_width)/2-pitch-leg_width, (length-2*pitch-network_length)/2+pitch, d_ceramics+mod(n_width,2)*(d_conductor+leg_height)}
      size = {leg_width, 2*leg_length+pitch, d_conductor}
    arr8: Array
      contributeto = csel3
      input = blk9
      size = floor((n_length)/2)
      type = linear
      linearsize = floor((n_length)/2)
      displ = {0, 2*(leg_length+pitch), 0}
    blk10: Block | contributeto = csel5; size = {width, length, d_ceramics}
    blk11: Block | contributeto = csel6; pos = {0, 0, height-d_ceramics}; size = {width, length, d_ceramics}
    sel1: ExplicitSelection "Hot Side" | selection = blk10(1) boundaries 1
    sel2: ExplicitSelection "Cold Side" | selection = blk11(1) boundaries 4
    sel3: ExplicitSelection "Terminal" | selection = blk5(1) boundaries 1
    sel4: ExplicitSelection "Ceramics Faces Toward Interior" | selection = blk10(1) boundaries 4; blk11(1) boundaries 1
    fin: Finalize "Form Union"

Materials
  mat1: Common "Bismuth Telluride - Bi2Te3, P-Type"
    def "Basic"
      heatcapacity = 154[J/(kg*K)]
      density = 7700[kg/m^3]
      seebeckcoefficient = -S(Tref)
      electricconductivity = sigma(Tref)
      thermalconductivity = k(Tref)
      relpermittivity = 1
      int1: Interpolation "Seebeck coefficient" | funcname = S; table = {{200, 168e-6}, {250, 192e-6}, {300, 210e-6}, {350, 225e-6}, {400, 237e-6}}; interp = cubicspline; argunit = K; fununit = V/K
      int2: Interpolation "Thermal conductivity" | funcname = k; table = {{200, 24e-1}, {250, 19e-1}, {300, 16e-1}, {350, 16e-1}, {400, 17.5e-1}}; interp = cubicspline; argunit = K; fununit = W/m/K
      int3: Interpolation "Electrical conductivity" | funcname = sigma; table = {{200, 1.4286e5}, {250, 1.1111e5}, {300, 0.86957e5}, {350, 0.71429e5}, {400, 0.58824e5}}; interp = cubicspline; argunit = K; fununit = S/m
  mat2: Common "Lead Telluride - PbTe, P-Type"
    def "Basic"
      density = 8160[kg/m^3]
      heatcapacity = 151[J/(kg*K)]
      relpermittivity = 1
      seebeckcoefficient = -187e-6[V/K]
      thermalconductivity = 1.46[W/(m*K)]
      electricconductivity = 6.0976e4[S/m]
  mat3: Common "Bismuth Telluride - Bi2Te3, N-Type"
    def "Basic"
      heatcapacity = 154[J/(kg*K)]
      density = 7700[kg/m^3]
      seebeckcoefficient = S(T)
      electricconductivity = sigma(T)
      thermalconductivity = k(T)
      relpermittivity = 1
      int1: Interpolation "Seebeck coefficient" | funcname = S; table = {{200, 168e-6}, {250, 192e-6}, {300, 210e-6}, {350, 225e-6}, {400, 237e-6}}; interp = cubicspline; argunit = K; fununit = V/K
      int2: Interpolation "Thermal conductivity" | funcname = k; table = {{200, 24e-1}, {250, 19e-1}, {300, 16e-1}, {350, 16e-1}, {400, 17.5e-1}}; interp = cubicspline; argunit = K; fununit = W/m/K
      int3: Interpolation "Electrical conductivity" | funcname = sigma; table = {{200, 1.4286e5}, {250, 1.1111e5}, {300, 0.86957e5}, {350, 0.71429e5}, {400, 0.58824e5}}; interp = cubicspline; argunit = K; fununit = S/m
  mat4: Common "Lead Telluride - PbTe, N-Type"
    def "Basic"
      density = 8160[kg/m^3]
      heatcapacity = 151[J/(kg*K)]
      relpermittivity = 1
      seebeckcoefficient = 187e-6[V/K]
      thermalconductivity = 1.46[W/(m*K)]
      electricconductivity = 6.0976e4[S/m]
  matlnk1: Link "P-Type Legs" on selection geom1_csel1_dom
  matlnk2: Link "N-Type Legs" on selection geom1_csel2_dom | link = mat3
  mat5: Common "Tungsten" on selection uni1
    def "Basic"
      thermalexpansioncoefficient = 4.5e-6[1/K]
      density = 17800[kg/m^3]
      heatcapacity = 132[J/(kg*K)]
      thermalconductivity = 175[W/(m*K)]
    Enu "Young's modulus and Poisson's ratio"
      youngsmodulus = 3.6e11[Pa]
      poissonsratio = 0.28
    Murnaghan
      l = -4.7e11[Pa]
      m = -7.9e11[Pa]
      n = -1.1e12[Pa]
    Lame "Lamé parameters"
      lambLame = 1.79e11[Pa]
      muLame = 1.41e11[Pa]
  mat6: Common "Copper" on selection geom1_csel3_dom
    def "Basic"
      relpermeability = 1
      electricconductivity = 5.998e7[S/m]
      thermalexpansioncoefficient = 17e-6[1/K]
      heatcapacity = 385[J/(kg*K)]
      relpermittivity = 1
      density = 8960[kg/m^3]
      thermalconductivity = 400[W/(m*K)]
    Enu "Young's modulus and Poisson's ratio"
      youngsmodulus = 110e9[Pa]
      poissonsratio = 0.35
    linzRes "Linearized resistivity"
      rho0 = 1.72e-8[ohm*m]
      alpha = 0.0039[1/K]
      Tref = 298[K]

Physics
  ht: HeatTransfer "Heat Transfer in Solids" on all domains
    dependent variable T
    ShapeProperty.order_temperature = 2s
    solid1: SolidHeatTransferModel "Solid 1" (default)
    init1: init "Initial Values 1" (default) | Tinit = Tref
    ins1: ThermalInsulation (default)
    temp1: TemperatureBoundary "Temperature 1" on selection geom1_sel1 | T0 = Tref
    bhs1: BoundaryHeatSource "Boundary Heat Source (Study 2)" on selection geom1_sel2
      heatSourceType = HeatRate
      Pb = Qmax
    bhs2: BoundaryHeatSource "Boundary Heat Source (Study 4)" on selection geom1_sel2
      heatSourceType = HeatRate
      Pb = Qvar
    ge1: GlobalEquations "Global Equations (Study 2)"
      name = Qmax
      equation = dT
      valueType = complex
      DependentVariableQuantity = power
      CustomDependentVariableUnit = m
      SourceTermQuantity = temperature
      CustomSourceTermUnit = m
    ge2: GlobalEquations "Global Equations (Study 4)"
      name = Qvar
      equation = dT-dT0
      valueType = complex
      DependentVariableQuantity = power
      CustomDependentVariableUnit = m
      SourceTermQuantity = temperature
      CustomSourceTermUnit = m
  ec: ConductiveMedia "Electric Currents" on selection uni3
    dependent variable V
    cucn1: CurrentConservation (default)
    ein1: ElectricInsulation (default)
    init1: init "Initial Values 1" (default)
    gnd1: Ground on selection int1
    term1: Terminal "Terminal (Study 1 and 2)" on selection geom1_sel3 | I0 = Imax
    term2: Terminal "Terminal (Study 3 and 4)" on selection geom1_sel3 | I0 = I0*Imax[A]
  ge: GlobalEquations "Global ODEs and DAEs"
    ge1: GlobalEquations
      name = dTmax
      equation = dT-dTmax
      valueType = complex
      DependentVariableQuantity = temperature
      CustomDependentVariableUnit = m
      SourceTermQuantity = temperature
      CustomSourceTermUnit = m
  opt: GeneralOptimization "Optimization" on no domains
    gobj1: GlobalObjective | objectiveExpression = dTmax^2
    gcvar1: GlobalControlVariables | variableList = Imax; initList = 1; lowerBoundList = 0.1; upperBoundList = 10

Multiphysics
  tee1: ThermoelectricEffect | Heat_physics = ht; EMCurrentDensity_physics = ec; DomainSelection: selection uni2
  emh1: ElectromagneticHeating | EMHeat_physics = ec; Heat_physics = ht

Mesh
  mesh1 "Mesh 1"
    size: MeshSizeDefault | hmax = min(leg_width,leg_length)/2; hauto = 4; custom = on
    map1: Map "Mapped 1" on selection box3
      size1: Size on selection box3 | hmax = min(leg_width,leg_length)/4; hmin = min(leg_width,leg_length)/6; custom = on
    swe1: Sweep "Swept 1" on selection box1
      dis1: Distribution on all domains | numelem = 2
    swe2: Sweep "Swept 2" on selection uni2
      dis1: Distribution on all domains | type = predefined; elemcount = 9; elemratio = 5; symmetric = on
    swe3: Sweep "Swept 3" on selection box2
      dis1: Distribution on all domains | numelem = 2
    fq1: FreeQuad on selection dif1
    swe4: Sweep "Swept 4" on selection uni1
      dis1: Distribution on all domains | numelem = 2

Studies
  std1 "Study 1: Optimal Performance"
    opt: Optimization | optsolver = snopt; opttolinner = 1.0E-3; nsolvemax = 20; objectivetype = maximization
    stat: Stationary | disabledphysics = {ht/bhs1, ht/bhs2, ht/ge1, ht/ge2, ec/term2}
  std2 "Study 2: Maximum Heat Dissipation"
    stat: Stationary
      solve for = {ht, ec}
      disabledphysics = {ht/bhs2, ht/ge2, ec/term2}
      usesol = on
      notsolmethod = sol
      notstudy = std1
  std3 "Study 3: Temperature Difference vs. Electrical Current"
    param: Parametric "Parametric Sweep" | pname = I0; plistarr = range(0.1,0.1,1.1); punit = 1
    stat: Stationary
      solve for = {ht, ec}
      disabledphysics = {ht/bhs1, ht/bhs2, ht/ge1, ht/ge2, ec/term1}
      usesol = on
      notsolmethod = sol
      notstudy = std1
  std4 "Study 4: Coefficient of Performance"
    param: Parametric "Parametric Sweep"
      sweeptype = filled
      pname = {dT0, I0}
      plistarr = {20 40 60, range(0.1,0.05,0.3) range(0.3,0.2,1)}
      punit = {K, 1}
    stat: Stationary
      solve for = {ht, ec}
      disabledphysics = {ht/bhs1, ht/ge1, ec/term1}
      usesol = on
      notsolmethod = sol
      notstudy = std1

Solver configurations
  sol1 "Solution 1" (study std1)
    v1: Variables "Dependent Variables 1"
    o1: Optimization "Optimization Solver 1"
      s1: StationaryAttrib "Stationary 1"
        d1: Direct "Direct, Heat Transfer Variables (ht)" | linsolver = pardiso; pivotperturb = 1.0E-13
        fc1: FullyCoupled
  sol2 "Solution 2" (study std2)
    v1: Variables "Dependent Variables 1"
    s1: Stationary "Stationary Solver 1"
      d1: Direct "Direct, Heat Transfer Variables (ht)" | linsolver = pardiso; pivotperturb = 1.0E-13
      fc1: FullyCoupled
  sol3 "Solution 3" (study std3)
    v1: Variables "Dependent Variables 1"
    s1: Stationary "Stationary Solver 1"
      p1: Parametric | pname = I0; plistarr = range(0.1,0.1,1.1); punit = 1; pcontinuationmode = no
      d1: Direct "Direct, Heat Transfer Variables (ht)" | linsolver = pardiso; pivotperturb = 1.0E-13
      fc1: FullyCoupled
  sol4 "Solution 4" (study std4)
    v1: Variables "Dependent Variables 1"
    s1: Stationary "Stationary Solver 1"
      p1: Parametric
        sweeptype = filled
        pname = {dT0, I0}
        plistarr = {20 40 60, range(0.1,0.05,0.3) range(0.3,0.2,1)}
        punit = {K, 1}
        pcontinuationmode = no
      d1: Direct "Direct, Heat Transfer Variables (ht)" | linsolver = pardiso; pivotperturb = 1.0E-13
      fc1: FullyCoupled

Datasets
  dset1: Solution | solution = sol1
  dset2: Solution | solution = sol2
  dset3: Solution | solution = sol3
  dset4: Solution | solution = sol4
  grid1: Grid1D | source = data; data = dset2; par1 = Q; parmax1 = 1000

Derived values
  gev1: EvalGlobal "Maximum Temperature Difference"
    data = dset1
    table = tbl1
    expr = dTmax
    unit = K
    descr = Maximum temperature difference
  gev2: EvalGlobal "Required Current for Maximum Temperature Difference"
    data = dset1
    table = tbl2
    expr = ec.I0_1
    unit = A
    descr = Required current for maximum temperature difference
  gev3: EvalGlobal "Required Voltage for Maximum Temperature Difference"
    data = dset1
    table = tbl3
    expr = ec.V0_1
    unit = V
    descr = Required voltage for maximum temperature difference
  gev4: EvalGlobal "Overall Electrical Resistance"
    data = dset1
    table = tbl4
    expr = ec.R11
    unit = Ω
    descr = Overall electrical resistance
  gev5: EvalGlobal "Maximum Heat Dissipation"
    data = dset2
    table = tbl5
    expr = Qmax
    unit = W
    descr = Maximum heat dissipation
  gev6: EvalGlobal "Coefficient of Performance"
    data = dset4
    table = tbl6
    tablecols = level2
    expr = Qvar/(ec.V0_2*ec.I0_2)
    descr = Coefficient of performance
  gev7: EvalGlobal "Maximum Coefficient of Performance"
    data = dset4
    table = tbl7
    tablecols = level2
    expr = Qvar/(ec.V0_2*ec.I0_2)
    descr = Maximum coefficient of performance
    dataseries = maximum
  av1: AvVolume "Figure of Merit" on selection geom1_csel1_dom
    data = dset1
    table = tbl8
    expr = tee1.Zmean
    unit = 1/K
    descr = Figure of merit

Tables
  tbl1: Table
    // Maximum Temperature Difference
    Maximum temperature difference (K)
    73.8232
  tbl2: Table
    // Required Current for Maximum Temperature Difference
    Required current for maximum temperature difference (A)
    3.17373
  tbl3: Table
    // Required Voltage for Maximum Temperature Difference
    Required voltage for maximum temperature difference (V)
    1.40061
  tbl4: Table
    // Overall Electrical Resistance
    Overall electrical resistance (Ω)
    0.441313
  tbl5: Table
    // Maximum Heat Dissipation
    Maximum heat dissipation (W)
    2.59827
  tbl6: Table
    // Coefficient of Performance
    I0 (1) | dT0=20, Coefficient of performance (1) | dT0=40, Coefficient of performance (1) | dT0=60, Coefficient of performance (1)
    0.1 | -0.731213 | -5.86867 | -8.8393
    0.15 | 1.13328 | -2.20821 | -4.33893
    0.2 | 1.57955 | -0.774152 | -2.38541
    0.25 | 1.63739 | -0.112935 | -1.37703
    0.3 | 1.57073 | 0.216688 | -0.8029
    0.3 | 1.57073 | 0.216688 | -0.8029
    0.5 | 1.13406 | 0.514269 | -0.00315353
    0.7 | 0.800036 | 0.445297 | 0.132448
    0.9 | 0.569359 | 0.340213 | 0.13114
  tbl7: Table
    // Maximum Coefficient of Performance
    dT0 (K) | Maximum: Maximum coefficient of performance (1)
    20 | 1.63739
    40 | 0.514269
    60 | 0.132448
  tbl8: Table
    // Figure of Merit
    Figure of merit (1/K)
    0.00237666

Plots
  pg1: PlotGroup3D "Temperature (ht)" | data = dset3
    surf1: Surface | expr = T
  pg2: PlotGroup3D "Isothermal Contours (ht)" | data = dset3
    iso1: Isosurface | expr = T; levelrounding = off
  pg3: PlotGroup3D "Electric Potential (ec)" | data = dset3
    mslc1: Multislice | expr = V
  pg4: PlotGroup1D "Temperature Difference vs. Electrical Current" | data = dset3; xlabel = I (A); ylabel = \Delta T (K)
    glob1: Global | expr = dT; unit = K; descr = Temperature difference; xdata = expr; xdataexpr = ec.I0_2
  pg5: PlotGroup1D "Coefficient of Performance" | data = none; xlabel = I/Imax; ylabel = COP
    tblp1: Table "Table Graph 1" | table = tbl6; legends = {Delta<i>T</i>: 20 K, Delta<i>T</i>: 40 K, Delta<i>T</i>: 60 K}
  pg6: PlotGroup1D "Temperature Difference vs. Heat Dissipation"
    data = grid1
    title = \Delta T(Q)
    xlabel = Q (W)
    ylabel = \Delta T (K)
    lngr1: LineGraph
      expr = if(dTmax-(dTmax/Qmax)*root.Q>0,dTmax-(dTmax/Qmax)*root.Q,NaN)
      xdata = expr
      xdataexpr = root.Q

Methods
  initalizeApplication: CodeEditor
    public class initalizeApplication extends ApplicationMethod {
      public void execute() {
        /**
        * Initializes the application. Runs everytime the main form loads.
        * Checks if a solution is available or not and updates the solution state.
        */
        if (!isInitialized) {
          if (model.sol("sol1").isEmpty() ||
              model.sol("sol2").isEmpty() ||
              model.sol("sol3").isEmpty() ||
              model.sol("sol4").isEmpty()) {
            infoState = "nosolution";
            buttonCreateReport.set("enabled", false);
            for (int i = 1; i < 8; i++) {
              model.result().table("tbl"+i).clearTableData();
            }
          } else {
            infoState = "solutionexists";
          }
          // Remove the axis orientation to get a cleaner "look-and-feel".
          model.component("comp1").view("view1").set("showaxisorientation", false);
          // Update the plots to fit the application
          model.result("pg1").set("titletype", "custom");
          model.result("pg1").set("solutionintitle", false);
          model.result("pg1").set("typeintitle", false);
          model.result("pg4").set("titletype", "manual");
          model.result("pg4").set("title", "Performance Chart \u0394T(I)");
          model.result("pg6").set("titletype", "manual");
          model.result("pg6").set("title", "Performance Chart \u0394T(Q)");
          model.result("pg5").set("titletype", "manual");
          model.result("pg5").set("title", "Coefficient of Performance");
          isInitialized = true;
        }
      }
    }
  resetToDefault: CodeEditor
    public class resetToDefault extends ApplicationMethod {
      public void execute() {
        /**
        * Opens a confirm dialog to check wether the user would like to
        * reset all parameters to default values or not.
        */
        if (confirm("Are you sure you want to reset all the parameters to their default values?", "Reset parameters to default values").equals("Yes")) {
          with(model.param());
            set("length", "8[mm]");
            set("width", "10[mm]");
            set("height", "2.5[mm]");
            set("d_conductor", "100[um]");
            set("d_ceramics", "0.3[mm]");
            set("leg_length", "1[mm]");
            set("leg_width", "1.2[mm]");
            set("pitch", "0.5[mm]");
            set("Tref", "323.15[K]");
          endwith();
          material = "mat1";
          changeMaterial();
          infoState = "inputchanged";
        }
      }
    }
  geometryChanged: CodeEditor
    public class geometryChanged extends ApplicationMethod {
      public void execute() {
        /**
        * Changes the information state and provides the info that the geometry is not updated.
        */
        infoState = "geomnotupdated";
        buttonCreateReport.set("enabled", false);
      }
    }
  changeMaterial: CodeEditor
    public class changeMaterial extends ApplicationMethod {
      public void execute() {
        /**
        * Changes the material.
        */
        model.material("matlnk1").set("link", material);
        if (material.equals("mat1")) {
          model.material("matlnk1").set("link", "mat3");
        } else if (material.equals("mat2")) {
          model.material("matlnk1").set("link", "mat4");
        }
        inputChanged();
      }
    }
  inputChanged: CodeEditor
    public class inputChanged extends ApplicationMethod {
      public void execute() {
        /**
        * Changes the information state and provides the info the the input has been changed.
        */
        infoState = "inputchanged";
        buttonCreateReport.set("enabled", false);
      }
    }
  setShowGrid: CodeEditor
    public class setShowGrid extends ApplicationMethod {
      public void execute(boolean isShowGrid) {
        /**
        * Shows or hides the grid.
        */
        model.component("comp1").view("view1").set("showgrid", isShowGrid);
      }
    }
  evaluateResults: CodeEditor
    public class evaluateResults extends ApplicationMethod {
      public void execute() {
        /**
        * Clears and evaluates the results table.
        */
        for (int i = 1; i <= 7; i++) {
          model.result().table("tbl"+i).clearTableData();
          if (i == 6) {
            model.result().numerical("gev6").setIndex("looplevelinput", "all", 1);
            model.result().numerical("gev6").setIndex("looplevelinput", "all", 0);
            model.result().numerical("gev6").set("tablecols", "level2");
          }
          model.result().numerical("gev"+i).set("table", "tbl"+i);
          model.result().numerical("gev"+i).setResult();
        }
        model.result().table("tbl8").clearTableData();
        model.result().numerical("av1").set("table", "tbl8");
        model.result().numerical("av1").setResult();
        buttonCreateReport.set("enabled", true);
      }
    }
  plotCoefficientOfPerformance: CodeEditor
    public class plotCoefficientOfPerformance extends ApplicationMethod {
      public void execute() {
        /**
        * Plots the Coefficient Of Performance and shows only y-values > 0
        */
        model.result("pg5").set("axislimits", false);
        model.result("pg5").run();
        model.result("pg5").set("axislimits", true);
        model.result("pg5").set("ymin", 0);
        useGraphics(model.result("pg5"), "main/graphics1");
        activeOutput = "outputMaxCoefficientOfPerformance";
      }
    }