// COMSOL Multiphysics 5.5.0.264 model "thermoelectric_leg.mph"
// Thermoelectric Leg
// modeldescr_heat/thermoelectric_leg
// This example solves the heat transfer and electric field in an thermoelectric leg. The Peltier effect is used for cooling purposes in this device.
// Outline of the model tree

Parameters
  T0 = 0[degC]  // Temperature reference
  J0 = 0.7[A]/(1[mm])^2  // Inward current density

Geometry
  geom1 "Geometry 1" (3D, length unit mm)
    blk1: Block | size = {1, 1, 6}; layername = Layer 1; layer = 0.1; layertop = on
    fin: Finalize "Form Union"

Materials
  mat1: Common "Bismuth Telluride - Bi2Te3" on all domains
    def "Basic"
      thermalconductivity = 1.6[W/(m*K)]
      density = 7740[kg/m^3]
      heatcapacity = 154.4[J/(kg*K)]
      electricconductivity = 1.1e5[S/m]
      relpermittivity = 1
      seebeckcoefficient = 2e-4[V/K]
  mat2: Common "Copper" on domains 1, 3
    def "Basic"
      relpermeability = 1
      electricconductivity = 5.998e7[S/m]
      thermalexpansioncoefficient = 17e-6[1/K]
      heatcapacity = 385[J/(kg*K)]
      relpermittivity = 1
      density = 8960[kg/m^3]
      thermalconductivity = 400[W/(m*K)]
      seebeckcoefficient = 6.5e-6[V/K]
    Enu "Young's modulus and Poisson's ratio"
      youngsmodulus = 110e9[Pa]
      poissonsratio = 0.35
    linzRes "Linearized resistivity"
      rho0 = 1.72e-8[ohm*m]
      alpha = 0.0039[1/K]
      Tref = 298[K]

Physics
  ht: HeatTransfer "Heat Transfer in Solids" on all domains
    dependent variable T
    solid1: SolidHeatTransferModel "Solid 1" (default)
    init1: init "Initial Values 1" (default)
    ins1: ThermalInsulation (default)
    temp1: TemperatureBoundary "Temperature 1" on boundaries 3 | T0 = T0
  ec: ConductiveMedia "Electric Currents" on all domains
    dependent variable V
    cucn1: CurrentConservation (default)
    ein1: ElectricInsulation (default)
    init1: init "Initial Values 1" (default)
    gnd1: Ground on boundaries 3
    ncd1: NormalCurrentDensity on boundaries 10 | nJ = J0

Multiphysics
  tee1: ThermoelectricEffect | Heat_physics = ht; EMCurrentDensity_physics = ec
  emh1: ElectromagneticHeating | EMHeat_physics = ec; Heat_physics = ht

Mesh
  mesh1 "Mesh 1"
    size: MeshSizeDefault | hmax = 0.6; hmin = 0.108; hcurve = 0.6; hnarrow = 0.5; hgrad = 1.5
    swe1: Sweep "Swept 1" on remaining entities | sourceface = boundaries 10

Studies
  std1 "Study 1"
    stat: Stationary

Solver configurations
  sol1 "Solution 1" (study std1)
    v1: Variables "Dependent Variables 1"
    s1: Stationary "Stationary Solver 1"
      se1: Segregated
        ss1: SegregatedStep "Electric Currents" | segvar = {comp1_V}; linsolver = i1
        ss2: SegregatedStep "Heat transfer" | segvar = {comp1_T}; linsolver = d1; subdamp = 0.8
        ll1: LowerLimit | lowerlimit = comp1.T 0
      i1: Iterative | linsolver = cg
        mg1: Multigrid | prefun = amg
      d1: Direct "Direct, Heat Transfer Variables (ht)" | linsolver = pardiso; pivotperturb = 1.0E-13

Datasets
  dset1: Solution | solution = sol1

Plots
  pg1: PlotGroup3D "Temperature (ht)" | data = dset1
    surf1: Surface | expr = T; unit = degC
  pg2: PlotGroup3D "Isothermal Contours (ht)" | data = dset1
    iso1: Isosurface | expr = T; unit = degC; levelrounding = off
    arwv1: ArrowVolume | expr = {ht.dfluxx, ht.dfluxy, ht.dfluxz}; xnumber = 2; ynumber = 2; arrowlength = logarithmic
  pg3: PlotGroup3D "Electric Potential (ec)" | data = dset1
    mslc1: Multislice | expr = V